#Lennard-Jones 3D potential
# This LAMMPS input script simulates LJ particles in a 3D box
# Written by Simon Gravelle (https://simongravelle.github.io/)
# Find more scripts here: https://github.com/simongravelle/lammps-input-files
# LAMMPS tutorials for beginners: https://lammpstutorials.github.io/

units lj
dimension 3
atom_style atomic
pair_style lj/cut 2.5
boundary p p p

region myreg block -30 30 -30 30 -30 30
create_box 2 myreg
create_atoms 1 random 5000 341341 myreg
create_atoms 2 random 500 127569 myreg

include parm.lammps

minimize 1.0e-4 1.0e-6 1000 10000
reset_timestep 0

fix mynve all nve
fix mylgv all langevin 1.0 1.0 0.1 1530917
timestep 0.005

thermo 1000
dump mydmp all atom 1000 dump.lammpstrj

run 20000
